<?xml version="1.0" ?>
<neuroml xmlns="http://www.neuroml.org/schema/neuroml2" xmlns:xs="http://www.w3.org/2001/XMLSchema" xmlns:xsi="http://www.w3.org/2001/XMLSchema-instance" xsi:schemaLocation="http://www.neuroml.org/schema/neuroml2 https://raw.github.com/NeuroML/NeuroML2/development/Schemas/NeuroML2/NeuroML_v2.3.1.xsd" id="exported_network">
    <expTwoSynapse id="synapse_generic" gbase="1nS" erev="0mV" tauDecay="10ms" tauRise="3ms"/>
    <iafCell id="cell" leakReversal="-70mV" thresh="-50mV" reset="-70mV" C="1nF" leakConductance="10nS"/>
    <network id="net">
        <population id="Sensory" component="cell" size="10" type="populationList"/>
        <population id="Hidden_0" component="cell" size="2" type="populationList"/>
        <population id="Hidden_1" component="cell" size="2" type="populationList"/>
        <population id="Hidden_2" component="cell" size="2" type="populationList"/>
        <population id="Hidden_3" component="cell" size="2" type="populationList"/>
        <population id="Hidden_4" component="cell" size="2" type="populationList"/>
        <population id="Hidden_5" component="cell" size="3" type="populationList"/>
        <population id="Output" component="cell" size="10" type="populationList"/>
        <projection id="Proj_In" presynapticPopulation="Sensory" postsynapticPopulation="Hidden_0" synapse="synapse_generic">
            <connectionWD id="0" preCellId="../Sensory/1/cell" postCellId="../Hidden_0/0/cell" weight="0.554221898317337" delay="1ms"/>
            <connectionWD id="1" preCellId="../Sensory/2/cell" postCellId="../Hidden_0/0/cell" weight="1.0" delay="1ms"/>
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        </projection>
        <projection id="Proj_Hidden_Fwd_0" presynapticPopulation="Hidden_0" postsynapticPopulation="Hidden_1" synapse="synapse_generic">
            <connectionWD id="0" preCellId="../Hidden_0/1/cell" postCellId="../Hidden_1/0/cell" weight="0.33877602321572553" delay="1ms"/>
            <connectionWD id="1" preCellId="../Hidden_0/2/cell" postCellId="../Hidden_1/0/cell" weight="0.016516958674874262" delay="1ms"/>
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        </projection>
        <projection id="Proj_Hidden_Fwd_1" presynapticPopulation="Hidden_1" postsynapticPopulation="Hidden_2" synapse="synapse_generic">
            <connectionWD id="0" preCellId="../Hidden_1/0/cell" postCellId="../Hidden_2/0/cell" weight="1.0" delay="1ms"/>
            <connectionWD id="1" preCellId="../Hidden_1/1/cell" postCellId="../Hidden_2/0/cell" weight="0.23931237508780612" delay="1ms"/>
            <connectionWD id="2" preCellId="../Hidden_1/0/cell" postCellId="../Hidden_2/1/cell" weight="0.17660920418792048" delay="1ms"/>
            <connectionWD id="3" preCellId="../Hidden_1/1/cell" postCellId="../Hidden_2/1/cell" weight="0.06134066973279256" delay="1ms"/>
        </projection>
        <projection id="Proj_Hidden_Fwd_2" presynapticPopulation="Hidden_2" postsynapticPopulation="Hidden_3" synapse="synapse_generic">
            <connectionWD id="0" preCellId="../Hidden_2/0/cell" postCellId="../Hidden_3/0/cell" weight="0.2188205560681844" delay="1ms"/>
            <connectionWD id="1" preCellId="../Hidden_2/1/cell" postCellId="../Hidden_3/0/cell" weight="0.23610871927603583" delay="1ms"/>
            <connectionWD id="2" preCellId="../Hidden_2/0/cell" postCellId="../Hidden_3/1/cell" weight="0.26149518880867717" delay="1ms"/>
            <connectionWD id="3" preCellId="../Hidden_2/1/cell" postCellId="../Hidden_3/1/cell" weight="0.2835755358471026" delay="1ms"/>
        </projection>
        <projection id="Proj_Hidden_Fwd_3" presynapticPopulation="Hidden_3" postsynapticPopulation="Hidden_4" synapse="synapse_generic">
            <connectionWD id="0" preCellId="../Hidden_3/1/cell" postCellId="../Hidden_4/0/cell" weight="0.20800664090423931" delay="1ms"/>
            <connectionWD id="1" preCellId="../Hidden_3/0/cell" postCellId="../Hidden_4/1/cell" weight="0.24992223435383945" delay="1ms"/>
            <connectionWD id="2" preCellId="../Hidden_3/1/cell" postCellId="../Hidden_4/1/cell" weight="0.1305555560261099" delay="1ms"/>
        </projection>
        <projection id="Proj_Hidden_Fwd_4" presynapticPopulation="Hidden_4" postsynapticPopulation="Hidden_5" synapse="synapse_generic">
            <connectionWD id="0" preCellId="../Hidden_4/0/cell" postCellId="../Hidden_5/2/cell" weight="0.18794252770178335" delay="1ms"/>
            <connectionWD id="1" preCellId="../Hidden_4/1/cell" postCellId="../Hidden_5/2/cell" weight="0.21302365253921485" delay="1ms"/>
        </projection>
        <projection id="Proj_Hidden_Rec_0" presynapticPopulation="Hidden_0" postsynapticPopulation="Hidden_0" synapse="synapse_generic"/>
        <projection id="Proj_Hidden_Rec_1" presynapticPopulation="Hidden_1" postsynapticPopulation="Hidden_1" synapse="synapse_generic"/>
        <projection id="Proj_Hidden_Rec_2" presynapticPopulation="Hidden_2" postsynapticPopulation="Hidden_2" synapse="synapse_generic"/>
        <projection id="Proj_Hidden_Rec_3" presynapticPopulation="Hidden_3" postsynapticPopulation="Hidden_3" synapse="synapse_generic"/>
        <projection id="Proj_Hidden_Rec_4" presynapticPopulation="Hidden_4" postsynapticPopulation="Hidden_4" synapse="synapse_generic"/>
        <projection id="Proj_Hidden_Rec_5" presynapticPopulation="Hidden_5" postsynapticPopulation="Hidden_5" synapse="synapse_generic"/>
        <projection id="Proj_Out" presynapticPopulation="Hidden_5" postsynapticPopulation="Output" synapse="synapse_generic">
            <connectionWD id="0" preCellId="../Hidden_5/0/cell" postCellId="../Output/0/cell" weight="0.4033835530281067" delay="1ms"/>
            <connectionWD id="1" preCellId="../Hidden_5/1/cell" postCellId="../Output/0/cell" weight="0.5966164469718933" delay="1ms"/>
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        </projection>
    </network>
</neuroml>
